*Heading
Sample UEL usage
**  8-node     7-----------3
**            /|          /|
**           / |         / |    y
**          5-----------1  |    |
**          |  |        |  |    |
**          |  |        |  |    |
**          |  8--------|--4    0-----> x
**          | /         | /    /
**          |/          |/    /
**          6-----------2    z   origin at node 8
*Node, nset=all_nodes
      1,           1.,           1.,           1.
      2,           1.,           0.,           1.
      3,           1.,           1.,           0.
      4,           1.,           0.,           0.
      5,           0.,           1.,           1.
      6,           0.,           0.,           1.
      7,           0.,           1.,           0.
      8,           0.,           0.,           0.
*Node, nset=press_node
      9,           0.5,          0.5,          0.5
** ----------------------------------------------------------------
** Variables = nlSdv * n_GP
***********************************
** Declaration for standard element
** *User Element, type=U3,Nodes=8,Coordinates=3,Properties=14,Iproperties=2,Variables=56,Unsymm
** 1,2,3
** MESH
** *Element, type=U3, elset=main_mesh
** 1, 5, 6, 8, 7, 1, 2, 4, 3
***********************************
** Declaration for hybrid element (could use U4 instead if both standard and hybrid elements were used simultaneously)
*User Element, type=U3, Nodes=9, Coordinates=3, Properties=14, Iproperties=2, Variables=56, Unsymm
1, 1, 2, 3
2, 1, 2, 3
3, 1, 2, 3
4, 1, 2, 3
5, 1, 2, 3
6, 1, 2, 3
7, 1, 2, 3
8, 1, 2, 3
9, 8
*Element, type=U3, elset=main_mesh
1, 5, 6, 8, 7, 1, 2, 4, 3, 9
** DUMMY MESH: offset of element numbering should be at UEL
*Element, type=C3D8, elset=dummy_mesh
1001, 5, 6, 8, 7, 1, 2, 4, 3
*Nset, nset=Set-1, generate
 2,  8,  2
*Nset, nset=Set-2, generate
 1,  7,  2
*Nset, nset=Set-3
 1, 2, 5, 6
*Nset, nset=Set-4, generate
 5,  8,  1
*Nset, nset=Set-5
 2, 4, 6, 8
*Nset, nset=Set-6
 3, 4, 7, 8
*Nset, nset=Set-7, generate
 1, 4, 1
*Nset, nset=Set-8
 1,3
*Nset, nset=Set-9
 6,8
*Elset, elset=Surf
 1,
** *Node, nset=extra_element
** 99992, 0.0,0.0,0.0
** 99993, 0.0001,0.0,0.0
** 99994, 0.0001,0.0001,0.0
** 99995, 0.0,0.0001,0.0
** 99996, 0.0,0.0,0.0001
** 99997, 0.0001,0.0,0.0001
** 99998, 0.0001,0.0001,0.0001
** 99999, 0.0,0.0001,0.0001
** *Element,type=C3D8T,elset=extra_element
** 99999, 99992,99993,99994,99995,99996,99997,99998,99999
**
** *Surface, type=ELEMENT, name=Surf-1
** Surf, S1
** *Surface, type=ELEMENT, name=Surf-2
** Surf, S2
** *Surface, type=ELEMENT, name=Surf-3
** Surf, S3
** *Surface, type=ELEMENT, name=Surf-4
** Surf, S4
** *Surface, type=ELEMENT, name=Surf-5
** Surf, S5
** *Surface, type=ELEMENT, name=Surf-6
** Surf, S6
*Imperfection
1,0,0,5.7062e-06
** ----------------------------------------------------------------
**                PARAMETERS: MATERIAL and SIMULATION
** ----------------------------------------------------------------
*include, input=properties.inp
** ----------------------------------------------------------------
************************************************************************
**			MATERIAL DEFINITION
************************************************************************
** ----------------------------------------------------------------
**     UD - user defined
** ----------------------------------------------------------------
*INCLUDE, file=sec_uel_cube.inp
** ----------------------------------------------------------------
**
** *Solid section, elset=extra_element, material=extra_material
*Solid section, elset=dummy_mesh, material=dummy_material
*Hourglass stiffness
250.0
**
** *Material, name=extra_material
** *Elastic
** 1.e-20
** *Conductivity
** 1.0
** *Density
** 1.0
** *Specific heat
** 1.0
**
*Material, name=dummy_material
** Must match ngSdv
*User output variables
7
*elastic
1.e-20
** ----------------------------------------------------------------
**
*Step, name=static1, nlgeom=Yes, inc=10000
*Static
0.0001, 0.01, 1e-07,0.001
** 0.01, 1., 1e-05, 0.1
** *Coupled temperature-displacement, deltmx=100.0
** 0.4,20.,1.e-6,0.2
************************************************************************
**			BOUNDARY CONDITIONS
************************************************************************
**
** ----------------------------------------------------------------
**     UNIAXIAL BCS
** ----------------------------------------------------------------
**INCLUDE, file=bcs_uni.inp
** ----------------------------------------------------------------
**     BIAXIAL BCS
** ----------------------------------------------------------------
*INCLUDE, file=bcs_bi.inp
** ----------------------------------------------------------------
**     SHEAR BCS
** ----------------------------------------------------------------
**INCLUDE, file=bcs_sh.inp
** ----------------------------------------------------------------
** ----------------------------------------------------------------
** OUTPUT
**Output, field, number interval=1, time marks=no
*Output, field, time marks=no
*node output, nset=all_nodes
u, rf
*node output, nset=press_node
por
** u,nt,rf
** *node output, nset=extra_element
** u
*element output, elset=dummy_mesh
uvarm,le
*End Step
** ----------------------------------------------------------------
