*Heading
** Job name: base_mesh_column Model name: UEL_Model
** Generated by: Abaqus/CAE 2024
*Preprint, echo=NO, model=NO, history=NO, contact=NO
** ----------------------------------------------------------------
**
** PART INSTANCE: Cube-1
**
*Node
      1,          20.,           1.,           1.
      2,          20.,           0.,           1.
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*System
**
*Node, nset=extra_element
99992, 0.0,0.0,0.0
99993, 0.0001,0.0,0.0
99994, 0.0001,0.0001,0.0
99995, 0.0,0.0001,0.0
99996, 0.0,0.0,0.0001
99997, 0.0001,0.0,0.0001
99998, 0.0001,0.0001,0.0001
99999, 0.0,0.0001,0.0001
** ==============================================================================
** 1. UEL DEFINITION (MAIN MESH)
** ==============================================================================
*User Element, type=U3, Nodes=8, Coordinates=3, Properties=26, Iproperties=2, Variables=848, Unsymm
1, 2, 3, 11
*Element, type=U3, elset=main_mesh
 1,  5,  6,  8,  7,  1,  2,  4,  3
 2,  9, 10, 12, 11,  5,  6,  8,  7
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**
** EXTRA ELEMENT
*Element,type=C3D8T,elset=extra_element
99999, 99992,99993,99994,99995,99996,99997,99998,99999
** ==============================================================================
** 2. C3D8 DEFINITION (DUMMY MESH FOR VISUALIZATION)
** ==============================================================================
*Element, type=C3D8, elset=dummy_mesh
100001,  5,  6,  8,  7,  1,  2,  4,  3
100002,  9, 10, 12, 11,  5,  6,  8,  7
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*Nset, nset=all_nodes
1, 2, 3, 4, 5, 6
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*Nset, nset=top_nodes
1, 3, 5, 7, 9, 11
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*Nset, nset=bottom_nodes
2, 4, 6, 8, 10, 12
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*Nset, nset=xmax_nodes
1, 2, 3, 4
*Nset, nset=zmax_nodes
1, 2, 5, 6, 9, 10
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*Nset, nset=x0_nodes
81, 82, 83, 84
*Nset, nset=z0_nodes
3, 4, 7, 8, 11, 12
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*Nset, nset=open_chem_nodes
1, 2, 3, 4
**
** ==============================================================================
** 5. PROPERTIES AND SIMULATION STEPS
** ==============================================================================
*include, input=properties.inp
*INCLUDE, file=sec_uel_cube.inp
*Solid section, elset=extra_element, material=extra_material
*Solid section, elset=dummy_mesh, material=dummy_material
*Hourglass stiffness
250.0
*Material, name=extra_material
*Elastic
1.e-20
*Conductivity
1.0
*Density
1.0
*Specific heat
1.0
*Material, name=dummy_material
*elastic
1.e-20
*User output variables
106
** ==============================================================================
** 6. INITIAL CONDITIONS
** ==============================================================================
*Initial conditions, type=temperature
extra_element, 0.0
*Initial conditions, type=temperature
all_nodes, <INITMU>
*Amplitude, name=ramp_load, time=STEP TIME
0.0, 0.0, 0.5, 1.0
*Step, name=Loading, nlgeom=YES, inc=1000
*Coupled Temperature-displacement, creep=none, deltmx=10.0
0.001, 0.5, 1e-15, 0.05
*Boundary
all_nodes, 3, 3, 0.0
bottom_nodes, 1, 2, 0.0
top_nodes, 2, 2, 0.0
*Boundary
extra_element, encastre
extra_element, 11, 11, 0.0
open_chem_nodes, 11, 11, <INITMU>
*Boundary, amplitude=ramp_load
top_nodes, 1, 1, <GAMMA>
*Output, field, time marks=no
*Node Output, nset=all_nodes
U, NT, RF, RFL
*Element Output, elset=dummy_mesh
UVARM, LE
*node output, nset=extra_element
u
*End Step
*Step, name=Hold, nlgeom=YES, inc=1000
*Coupled Temperature-displacement, creep=none, deltmx=10.0
0.01, 1000.0, 1e-15, 10.0
*Boundary
top_nodes, 1, 1, <GAMMA>
*Output, field, time marks=no
*Node Output, nset=all_nodes
U, NT, RF, RFL
*Element Output, elset=dummy_mesh
UVARM, LE
*node output, nset=extra_element
u
*End Step
**
