*Heading
** Job name: base_mesh_afm Model name: UEL_Model
** Generated by: Abaqus/CAE 2024
*Preprint, echo=NO, model=NO, history=NO, contact=NO
** ----------------------------------------------------------------
**
** PART INSTANCE: Cube-1
**
*Node
1, 60, 60, 60
2, 60, 59.0660716, 60
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*System
**
** INDENTER: radius = 20, initial_gap = 0.1, length_scale = 20, position = vertex
*Node, nset=extra_element
99992, 0.0,0.0,0.0
99993, 0.0001,0.0,0.0
99994, 0.0001,0.0001,0.0
99995, 0.0,0.0001,0.0
99996, 0.0,0.0,0.0001
99997, 0.0001,0.0,0.0001
99998, 0.0001,0.0001,0.0001
99999, 0.0,0.0001,0.0001
** ==============================================================================
** 1. UEL DEFINITION (MAIN MESH)
** ==============================================================================
*User Element, type=U3, Nodes=8, Coordinates=3, Properties=26, Iproperties=2, Variables=848, Unsymm
1, 2, 3, 11
*Element, type=U3, elset=main_mesh
   1,  290,  291,  308,  307,    1,    2,   19,   18
   2,  291,  292,  309,  308,    2,    3,   20,   19
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**
** EXTRA ELEMENT
*Element,type=C3D8T,elset=extra_element
99999, 99992,99993,99994,99995,99996,99997,99998,99999
** ==============================================================================
** 2. C3D8 DEFINITION (DUMMY MESH FOR VISUALIZATION)
** ==============================================================================
*Element, type=C3D8, elset=dummy_mesh
100001,  290,  291,  308,  307,    1,    2,   19,   18
100002,  291,  292,  309,  308,    2,    3,   20,   19
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**
** ==============================================================================
** 3. NODE SETS & CHEMICAL BOUNDARY
** ==============================================================================
*Nset, nset=all_nodes
1, 2, 3, 4, 5, 6
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*Nset, nset=top_nodes
1, 18, 35, 52, 69, 86
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*Nset, nset=bottom_nodes
17, 34, 51, 68, 85, 102
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*Nset, nset=xmax_nodes
1, 2, 3, 4, 5, 6
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*Nset, nset=zmax_nodes
1, 2, 3, 4, 5, 6
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*Nset, nset=x0_nodes
4625, 4626, 4627, 4628, 4629, 4630
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*Nset, nset=z0_nodes
273, 274, 275, 276, 277, 278
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*Elset, elset=probe_mesh
100001, 100002, 100003, 100004, 100005, 100006, 100007, 100008, 100009, 100010, 100011, 100012, 100013, 100014, 100015, 100016
**
** ==============================================================================
** 4. RIGID INDENTER AND CONTACT
** ==============================================================================
*Node, nset=IndenterRef
100000, 60, 80.1, 60
*Surface, type=REVOLUTION, name=SURFACE-Probe
********
60, 80.1, 60,   60, 100.1, 60
START,          20,           0.
 CIRCL,           0.,         -20,           0.,           0.
*Rigid Body, ref node=100000, analytical surface=SURFACE-Probe
**
*Surface, type=ELEMENT, name=SURFACE-Top
100001, S6
100017, S6
100033, S6
100049, S6
100065, S6
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104081, S6
**
*Surface Interaction, name=INTPROP-Frictionless
1.,
*Friction
0.,
*Surface Behavior, augmented Lagrange
*Contact Pair, interaction=INTPROP-Frictionless, type=SURFACE TO SURFACE
SURFACE-Top, SURFACE-Probe
**
** ==============================================================================
** 5. PROPERTIES AND SIMULATION STEPS
** ==============================================================================
*include, input=properties.inp
*INCLUDE, file=sec_uel_cube.inp
*Solid section, elset=extra_element, material=extra_material
*Solid section, elset=dummy_mesh, material=dummy_material
*Hourglass stiffness
250.0
*Material, name=extra_material
*Elastic
1.e-20
*Conductivity
1.0
*Density
1.0
*Specific heat
1.0
*Material, name=dummy_material
*elastic
1.e-20
*User output variables
106
** ==============================================================================
** 6. INITIAL CONDITIONS
** ==============================================================================
*Initial conditions, type=temperature
extra_element, 0.0
*Initial conditions, type=temperature
all_nodes, <INITMU>
*Amplitude, name=ramp_load, time=STEP TIME
0.0, 0.0, 2.0, 1.0
**
*Step, name=Equilibrate, nlgeom=YES, inc=10000
*Coupled Temperature-displacement, creep=none, deltmx=10.0
0.1, 200.0, 1e-15, 20.0
*Boundary
** Fix the bottom of the gel
bottom_nodes, YSYMM
** Apply Quarter Symmetry boundary conditions for vertex indentation
xmax_nodes, XSYMM
zmax_nodes, ZSYMM
** Extra Element Fix
extra_element, encastre
extra_element, 11, 11, 0.0
** Indenter Constraints
IndenterRef, 1, 1
IndenterRef, 3, 3
IndenterRef, 4, 4
IndenterRef, 5, 5
IndenterRef, 6, 6
*Boundary
IndenterRef, 2, 2, 0.0
*Output, field, number interval=4, time marks=no
*Node Output, nset=all_nodes
U, NT, RF, RFL
*Node Output, nset=IndenterRef
U, RF
*Element Output, elset=dummy_mesh
UVARM1, UVARM2, UVARM3, UVARM4, UVARM5, UVARM6, UVARM7, UVARM8, UVARM9, UVARM10, LE
*Element Output, elset=probe_mesh
UVARM
*node output, nset=extra_element
u
*Output, history, frequency=1
*Node Output, nset=IndenterRef
U2, RF2
*End Step
**
*Step, name=Indentation, nlgeom=YES, inc=10000
*Coupled Temperature-displacement, creep=none, deltmx=10.0
0.002, 2.0, 1e-15, 0.05
*Boundary, amplitude=ramp_load
IndenterRef, 2, 2, <UIND>
*Output, field, number interval=20, time marks=no
*Node Output, nset=all_nodes
U, NT, RF, RFL
*Node Output, nset=IndenterRef
U, RF
*Element Output, elset=dummy_mesh
UVARM1, UVARM2, UVARM3, UVARM4, UVARM5, UVARM6, UVARM7, UVARM8, UVARM9, UVARM10, LE
*Element Output, elset=probe_mesh
UVARM
*node output, nset=extra_element
u
*Output, history, frequency=1
*Node Output, nset=IndenterRef
U2, RF2
*End Step
**
*Step, name=Hold, nlgeom=YES, inc=10000
*Coupled Temperature-displacement, creep=none, deltmx=10.0
0.01, 600.0, 1e-15, 10.0
*Boundary
IndenterRef, 2, 2, <UIND>
*Output, field, number interval=120, time marks=no
*Node Output, nset=all_nodes
U, NT, RF, RFL
*Node Output, nset=IndenterRef
U, RF
*Element Output, elset=dummy_mesh
UVARM1, UVARM2, UVARM3, UVARM4, UVARM5, UVARM6, UVARM7, UVARM8, UVARM9, UVARM10, LE
*Element Output, elset=probe_mesh
UVARM
*node output, nset=extra_element
u
*Output, history, frequency=1
*Node Output, nset=IndenterRef
U2, RF2
*End Step
**
