*Heading
** Job name: cube_indent Model name: Model-1
** Generated by: Abaqus/CAE 2024
*Preprint, echo=NO, model=NO, history=NO, contact=NO
**
** PARTS
**
*Part, name=cube
*Node
      1,           2.,           2.,           2.
      2,           2.,          1.5,           2.
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*Element, type=C3D8H
 1,  26,  27,  32,  31,   1,   2,   7,   6
 2,  27,  28,  33,  32,   2,   3,   8,   7
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*Nset, nset=Set-Cube, generate
   1,  125,    1
*Elset, elset=Set-Cube, generate
  1,  64,   1
** Section: SECTION_hyperelastic
*Solid Section, elset=Set-Cube, material=Material-Neo-Hooke
,
*End Part
**
*Part, name=probe
*End Part
**
**
** ASSEMBLY
**
*Assembly, name=Assembly
**
*Instance, name=cube-1, part=cube
*End Instance
**
*Instance, name=probe-1, part=probe
          2.,         2.75,           2.
*Node
      1, -9.18485073e-17,         -0.5,           0.
*Nset, nset=probe-1-RefPt_, internal
1,
*Surface, type=REVOLUTION, name=SURFACE-Probe
START,          0.5,           0.
 CIRCL,           0.,         -0.5,           0.,           0.
*Rigid Body, ref node=probe-1-RefPt_, analytical surface=SURFACE-Probe
*End Instance
**
*Nset, nset=Set-Bottom, instance=cube-1, generate
   5,  125,    5
*Elset, elset=Set-Bottom, instance=cube-1, generate
  4,  64,   4
*Nset, nset=Set-RP, instance=probe-1
 1,
*Nset, nset=Set-XSYMM, instance=cube-1, generate
  1,  25,   1
*Elset, elset=Set-XSYMM, instance=cube-1, generate
  1,  16,   1
*Nset, nset=Set-ZSYMM, instance=cube-1
   1,   2,   3,   4,   5,  26
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*Elset, elset=Set-ZSYMM, instance=cube-1
  1,  2,  3,  4, 17, 18, 19, 20, 33, 34, 35, 36, 49, 50, 51, 52
*Elset, elset=_SURFACE-Top_S6, internal, instance=cube-1, generate
  1,  61,   4
*Surface, type=ELEMENT, name=SURFACE-Top
_SURFACE-Top_S6, S6
*End Assembly
**
** MATERIALS
**
*Material, name=Material-1
*Elastic
1., 0.45
*Material, name=Material-Neo-Hooke
*Density
1.,
*Hyperelastic, neo hooke
1., 0.005
**
** INTERACTION PROPERTIES
**
*Surface Interaction, name=INTPROP-Frictionless
1.,
*Friction
0.,
*Surface Behavior, augmented Lagrange
**
** INTERACTIONS
**
** Interaction: INTERACTION-Contact
*Contact Pair, interaction=INTPROP-Frictionless, type=SURFACE TO SURFACE
SURFACE-Top, probe-1.SURFACE-Probe
** ----------------------------------------------------------------
**
** STEP: indentation
**
*Step, name=indentation, nlgeom=YES
*Static
0.1, 1., 1e-05, 0.2
**
** BOUNDARY CONDITIONS
**
** Name: BC-Fix Type: Symmetry/Antisymmetry/Encastre
*Boundary
Set-Bottom, ENCASTRE
** Name: BC-ProbeDisplacement Type: Displacement/Rotation
*Boundary
Set-RP, 1, 1
Set-RP, 2, 2, -0.5
Set-RP, 3, 3
Set-RP, 4, 4
Set-RP, 5, 5
Set-RP, 6, 6
** Name: BC-XSYMM Type: Symmetry/Antisymmetry/Encastre
*Boundary
Set-XSYMM, XSYMM
** Name: BC-ZSYMM Type: Symmetry/Antisymmetry/Encastre
*Boundary
Set-ZSYMM, ZSYMM
**
** OUTPUT REQUESTS
**
*Restart, write, frequency=0
**
** FIELD OUTPUT: F-Output-1
**
*Output, field, variable=PRESELECT
**
** HISTORY OUTPUT: H-Output-1
**
*Output, history, variable=PRESELECT
*End Step
