*Heading
** Job name: base_mesh Model name: UEL_Model
** Generated by: Abaqus/CAE 2024
*Preprint, echo=NO, model=NO, history=NO, contact=NO
** ----------------------------------------------------------------
**
** PART INSTANCE: Cube-1
**
*Node
      1,           2.,           2.,           2.
      2,           2.,   1.79999995,           2.
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*Nset, nset=all_nodes, generate
    1,  1331,     1
*Nset, nset=bottom_nodes
  111,  112,  113,  114,  115,  116
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*Nset, nset=top_nodes
    1,    2,    3,    4,    5,    6
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**
*Node, nset=extra_element
99992, 0.0,0.0,0.0
99993, 0.0001,0.0,0.0
99994, 0.0001,0.0001,0.0
99995, 0.0,0.0001,0.0
99996, 0.0,0.0,0.0001
99997, 0.0001,0.0,0.0001
99998, 0.0001,0.0001,0.0001
99999, 0.0,0.0001,0.0001
** ==============================================================================
** 1. UEL DEFINITION (MAIN MESH)
** ==============================================================================
*User Element, type=U3, Nodes=8, Coordinates=3, Properties=24, Iproperties=2, Variables=848, Unsymm
1, 2, 3, 11
*Element, type=U3, elset=main_mesh
   1,  122,  123,  134,  133,    1,    2,   13,   12
   2,  123,  124,  135,  134,    2,    3,   14,   13
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*System
**
** EXTRA ELEMENT
*Element,type=C3D8T,elset=extra_element
99999, 99992,99993,99994,99995,99996,99997,99998,99999
** ==============================================================================
** 2. C3D8 DEFINITION (DUMMY MESH FOR VISUALIZATION)
** ==============================================================================
*Element, type=C3D8, elset=dummy_mesh
100001,  122,  123,  134,  133,    1,    2,   13,   12
100002,  123,  124,  135,  134,    2,    3,   14,   13
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**
** ==============================================================================
** 3. NODE SETS & CHEMICAL BOUNDARY
** ==============================================================================
*Nset, nset=all_nodes
1, 2, 3, 4, 5, 6
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*Nset, nset=bottom_nodes
11, 22, 33, 44, 55, 66
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*Nset, nset=xmax_nodes
1, 2, 3, 4, 5, 6
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*Nset, nset=zmax_nodes
1, 2, 3, 4, 5, 6
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**
** ==============================================================================
** 4. RIGID INDENTER AND CONTACT
** ==============================================================================
*Node, nset=IndenterRef
100000, 2.0, 2.75, 2.0
*Surface, type=REVOLUTION, name=SURFACE-Probe
********
2.0, 2.75, 2.0,   2.0, 3.75, 2.0
START,          0.5,           0.
 CIRCL,           0.,         -0.5,           0.,           0.
*Rigid Body, ref node=100000, analytical surface=SURFACE-Probe
**
*Surface, type=ELEMENT, name=SURFACE-Top
100001, S6
100011, S6
100021, S6
100031, S6
100041, S6
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100991, S6
**
*Surface Interaction, name=INTPROP-Frictionless
1.,
*Friction
0.,
*Surface Behavior, augmented Lagrange
*Contact Pair, interaction=INTPROP-Frictionless, type=SURFACE TO SURFACE
SURFACE-Top, SURFACE-Probe
**
** ==============================================================================
** 5. PROPERTIES AND SIMULATION STEPS
** ==============================================================================
*include, input=properties.inp
*INCLUDE, file=sec_uel_cube.inp
*Solid section, elset=extra_element, material=extra_material
*Solid section, elset=dummy_mesh, material=dummy_material
*Hourglass stiffness
250.0
*Material, name=extra_material
*Elastic
1.e-20
*Conductivity
1.0
*Density
1.0
*Specific heat
1.0
*Material, name=dummy_material
*elastic
1.e-20
*User output variables
106
** ==============================================================================
** 6. INITIAL CONDITIONS
** ==============================================================================
*Initial conditions, type=temperature
extra_element, 0.0
*Initial conditions, type=temperature
all_nodes, <INITMU>
**
*Step, name=Indentation, nlgeom=YES, inc=10000
*Coupled Temperature-displacement, creep=none, deltmx=10.0
0.001, 1.0, 1e-15, 0.02
*Boundary
** Fix the bottom of the gel
bottom_nodes, YSYMM
** Apply Quarter Symmetry boundary conditions for vertex indentation
xmax_nodes, XSYMM
zmax_nodes, ZSYMM
** Extra Element Fix
*Boundary
extra_element, encastre
extra_element, 11, 11, 0.0
** Indenter Constraints
IndenterRef, 1, 1
IndenterRef, 3, 3
IndenterRef, 4, 4
IndenterRef, 5, 5
IndenterRef, 6, 6
IndenterRef, 2, 2, -0.5
*Output, field, time marks=no
*Node Output, nset=all_nodes
U, NT, RF
*Node Output, nset=IndenterRef
U, RF
*Element Output, elset=dummy_mesh
UVARM, LE
*node output, nset=extra_element
u
*End Step
**
*Step, name=Hold, nlgeom=YES, inc=10000
*Coupled Temperature-displacement, creep=none, deltmx=10.0
0.0001, 10.0, 1e-15, 0.5
*Boundary
IndenterRef, 2, 2, -0.5
*Output, field, time marks=no
*Node Output, nset=all_nodes
U, NT, RF
*Node Output, nset=IndenterRef
U, RF
*Element Output, elset=dummy_mesh
UVARM, LE
*node output, nset=extra_element
u
*End Step
**
*Step, name=Withdraw, nlgeom=YES, inc=10000
*Coupled Temperature-displacement, creep=none, deltmx=10.0
0.0001, 1.0, 1e-15, 0.02
*Boundary
IndenterRef, 2, 2, 0.0
*Output, field, time marks=no
*Node Output, nset=all_nodes
U, NT, RF
*Node Output, nset=IndenterRef
U, RF
*Element Output, elset=dummy_mesh
UVARM, LE
*node output, nset=extra_element
u
*End Step
**
*Step, name=Relax, nlgeom=YES, inc=10000
*Coupled Temperature-displacement, creep=none, deltmx=10.0
0.0001, 10.0, 1e-15, 0.5
*Boundary
IndenterRef, 2, 2, 0.0
*Output, field, time marks=no
*Node Output, nset=all_nodes
U, NT, RF
*Node Output, nset=IndenterRef
U, RF
*Element Output, elset=dummy_mesh
UVARM, LE
*node output, nset=extra_element
u
*End Step
**
