*Heading
** Job name: base_mesh Model name: UEL_Model
** Generated by: Abaqus/CAE 2024
*Preprint, echo=NO, model=NO, history=NO, contact=NO
** ----------------------------------------------------------------
**
** PART INSTANCE: Cube-1
**
*Node
      1,           2.,           2.,           2.
      2,           2.,   1.79999995,           2.
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*System
**
** ==============================================================================
** 1. UEL DEFINITION (MAIN MESH)
** ==============================================================================
*User Element, type=U3, Nodes=8, Coordinates=3, Properties=26, Iproperties=2, Variables=848, Unsymm
1, 2, 3, 11
*Element, type=U3, elset=main_mesh
   1,  122,  123,  134,  133,    1,    2,   13,   12
   2,  123,  124,  135,  134,    2,    3,   14,   13
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**
** ==============================================================================
** 2. C3D8T DEFINITION (DUMMY MESH FOR VISUALIZATION)
** ==============================================================================
*Element, type=C3D8T, elset=dummy_mesh
100001,  122,  123,  134,  133,    1,    2,   13,   12
100002,  123,  124,  135,  134,    2,    3,   14,   13
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**
** ==============================================================================
** 3. NODE SETS & CHEMICAL BOUNDARY
** ==============================================================================
*Nset, nset=all_nodes
1, 2, 3, 4, 5, 6
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*Nset, nset=top_nodes
1, 12, 23, 34, 45, 56
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*Nset, nset=bottom_nodes
11, 22, 33, 44, 55, 66
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*Nset, nset=xmax_nodes
1, 2, 3, 4, 5, 6
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*Nset, nset=zmax_nodes
1, 2, 3, 4, 5, 6
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*Nset, nset=x0_nodes
1211, 1212, 1213, 1214, 1215, 1216
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*Nset, nset=z0_nodes
111, 112, 113, 114, 115, 116
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**
** ==============================================================================
** 5. PROPERTIES AND SIMULATION STEPS
** ==============================================================================
*include, input=properties.inp
*INCLUDE, file=sec_uel_cube.inp
**
*Solid section, elset=dummy_mesh, material=dummy_material
*Hourglass stiffness
250.0
**
*Material, name=dummy_material
*User output variables
108
*elastic
1.e-20
*Conductivity
1.0
*Density
1.0
*Specific heat
1.0
**
** ==============================================================================
** 6. INITIAL CONDITIONS
** ==============================================================================
*Initial conditions, type=temperature
all_nodes, <INITMU>
**
*Step, name=Loading, nlgeom=YES, inc=10000
*Coupled Temperature-displacement, creep=none, deltmx=10.0
0.001, 1.0, 1e-15, 0.05
*Boundary
** Fix the bottom of the gel
bottom_nodes, YSYMM
** Symmetry boundary conditions
x0_nodes, XSYMM
z0_nodes, ZSYMM
** Uniaxial Stretch
top_nodes, 2, 2, 0.35
*Output, field, time marks=no
*Node Output, nset=all_nodes
U, NT
*Node Output, nset=top_nodes
U, RF
*Element Output, elset=dummy_mesh
UVARM, LE
*End Step
**
*Step, name=Hold, nlgeom=YES, inc=10000
*Coupled Temperature-displacement, creep=none, deltmx=10.0
0.001, 10.0, 1e-15, 0.5
*Boundary
top_nodes, 2, 2, 0.35
*Output, field, time marks=no
*Node Output, nset=all_nodes
U, NT
*Node Output, nset=top_nodes
U, RF
*Element Output, elset=dummy_mesh
UVARM, LE
*End Step
**
*Step, name=Unloading, nlgeom=YES, inc=10000
*Coupled Temperature-displacement, creep=none, deltmx=10.0
0.001, 1.0, 1e-15, 0.1
*Boundary
top_nodes, 2, 2, 0.0
*Output, field, time marks=no
*Node Output, nset=all_nodes
U, NT
*Node Output, nset=top_nodes
U, RF
*Element Output, elset=dummy_mesh
UVARM, LE
*End Step
**
*Step, name=Relax, nlgeom=YES, inc=10000
*Coupled Temperature-displacement, creep=none, deltmx=10.0
0.001, 10.0, 1e-15, 0.5
*Boundary
top_nodes, 2, 2, 0.0
*Output, field, time marks=no
*Node Output, nset=all_nodes
U, NT
*Node Output, nset=top_nodes
U, RF
*Element Output, elset=dummy_mesh
UVARM, LE
*End Step
**
