*Heading
Rigid body rotation test (objectivity): no imposed deformation, no imposed chemical loading
**  8-node     7-----------3
**            /|          /|
**           / |         / |    y
**          5-----------1  |    |
**          |  |        |  |    |
**          |  |        |  |    |
**          |  8--------|--4    0-----> x
**          | /         | /    /
**          |/          |/    /
**          6-----------2    z   origin at node 8
*Node, nset=all_nodes
      1,           1.,           1.,           1.
      2,           1.,           0.,           1.
      3,           1.,           1.,           0.
      4,           1.,           0.,           0.
      5,           0.,           1.,           1.
      6,           0.,           0.,           1.
      7,           0.,           1.,           0.
      8,           0.,           0.,           0.
** ----------------------------------------------------------------
** Variables = nlSdv * n_GP
** DOF 11 is the chemical potential
*User Element, type=U3,Nodes=8,Coordinates=3,Properties=24,Iproperties=2,Variables=848,Unsymm
1,2,3,11
** MESH
*Element, type=U3, elset=main_mesh
1, 5, 6, 8, 7, 1, 2, 4, 3
** DUMMY MESH: offset of element numbering should be at UEL
*Element, type=C3D8, elset=dummy_mesh
100001, 5, 6, 8, 7, 1, 2, 4, 3
*Nset, nset=Set-1, generate
 2,  8,  2
*Nset, nset=Set-2, generate
 1,  7,  2
*Nset, nset=Set-3
 1, 2, 5, 6
*Nset, nset=Set-4, generate
 5,  8,  1
*Nset, nset=Set-5
 2, 4, 6, 8
*Nset, nset=Set-6
 3, 4, 7, 8
*Nset, nset=Set-7, generate
 1, 4, 1
*Nset, nset=Set-8
 1,3
*Nset, nset=Set-9
 6,8
*Elset, elset=Surf
 1,
*Node, nset=extra_element
99992, 0.0,0.0,0.0
99993, 0.0001,0.0,0.0
99994, 0.0001,0.0001,0.0
99995, 0.0,0.0001,0.0
99996, 0.0,0.0,0.0001
99997, 0.0001,0.0,0.0001
99998, 0.0001,0.0001,0.0001
99999, 0.0,0.0001,0.0001
*Element,type=C3D8T,elset=extra_element
99999, 99992,99993,99994,99995,99996,99997,99998,99999
**
** RIGID BODY ROTATION: reference node at the cube centre, rigidly tied to all cube nodes
*Node, nset=ref_node
99980, 0.5, 0.5, 0.5
*Kinematic Coupling, ref node=ref_node
all_nodes, 1, 3
**
** *Surface, type=ELEMENT, name=Surf-1
** Surf, S1
** *Surface, type=ELEMENT, name=Surf-2
** Surf, S2
** *Surface, type=ELEMENT, name=Surf-3
** Surf, S3
** *Surface, type=ELEMENT, name=Surf-4
** Surf, S4
** *Surface, type=ELEMENT, name=Surf-5
** Surf, S5
** *Surface, type=ELEMENT, name=Surf-6
** Surf, S6
*Imperfection
** Applies a small initial imperfection to the first node in the mesh, in the z-direction
** Prevents constantly homogeneous deformation
1,0,0,5.7062e-06
** ----------------------------------------------------------------
**                PARAMETERS: MATERIAL and SIMULATION
** ----------------------------------------------------------------
*include, input=properties.inp
** ----------------------------------------------------------------
************************************************************************
**			MATERIAL DEFINITION
************************************************************************
** ----------------------------------------------------------------
**     UD - user defined
** ----------------------------------------------------------------
*INCLUDE, file=sec_uel_cube.inp
** ----------------------------------------------------------------
**
*Solid section, elset=extra_element, material=extra_material
*Solid section, elset=dummy_mesh, material=dummy_material
*Hourglass stiffness
250.0
**
*Material, name=extra_material
** These properties have no effect in the simulation
*Elastic
1.e-20
*Conductivity
1.0
*Density
1.0
*Specific heat
1.0
**
*Material, name=dummy_material
** !!!!!!!!!!!!!!!!!
** Must match ngSdv
** !!!!!!!!!!!!!!!!!
*User output variables
106
*elastic
1.e-20
**
**
************************************************************************
**			INITIAL CONDITIONS
************************************************************************
*Initial conditions, type=temperature
all_nodes, <INITMU>
**
*Initial conditions, type=temperature
extra_element, 0.0
**
************************************************************************
**			AMPLITUDE DEFINITION
************************************************************************
** Chemical loading amplitude not used in the rotation test
** *Amplitude, name=chemProfile
** 0.0,<INITMU>,<TF>,<MU0>
** *Amplitude, name=chemProfile1, definition=decay
** <mu0>,<initMU>,0.0,60.0
** *Time points, Name=outTimes
** 1,2,3,4,5,6,7,8,
** 9,10,11,12,13,14,15,16,
** 17,18,19,20,21,22,23,24,
** 25,26,27,28,29,30,31,32,
** 33,34,35,36,37,38,39,40,
** 41,42,43,44,45,46,47,48,
** 49,50,51,52,53,54,55,56,
** 57,58,59,60,61,62,63,64,
** 65,66,67,68,69,70,71,72,
** 73,74,75,76,77,78,79,80,
** 81,82,83,84,85,86,87,88,
** 89,90,91,92,93,94,95,96,
** 97,98,99,100,315,530,745,960,
** 1175,1390,1605,1820,2035,2250,2465,2680,
** 2895,3110,3325,3540,3755,3970,4185,4400,
** 4615,4830,5045,5260,5475,5690,5905,6120,
** 6335,6550,6765,6980,7195,7410,7625,7840,
** 8055,8270,8485,8700,8915,9130,9345,9560,
** 9775,9990,10205,10420,10635,10850,11065,11280,
** 11495,11710,11925,12140,12355,12570,12785,13000,
** 13215,13430,13645,13860,14075,14290,14505,14720,
** 14935,15150,15365,15580,15795,16010,16225,16440,
** 16655,16870,17085,17300,17515,17730,17945,18160,
** 18375,18590,18805,19020,19235,19450,19665,19880,
** 20095,20310,20525,20740,20955,21170,21385,21500
**
** *Amplitude, name=chemProfile, definition=decay
** <mu0>,<initMU>,0.0,60.0
************************************************************************
**			STEP DEFINITION
************************************************************************
************************************************************************
** STEP 1: RIGID BODY ROTATION (no imposed deformation, no chemical BCs)
************************************************************************
** Symmetry BCs removed: they would conflict with the rigid rotation
** *Boundary, op=MOD
** Set-3, ZSYMM
** *Boundary, op=MOD
** Set-4, XSYMM
** *Boundary, op=MOD
** Set-1, YSYMM


*Step, Name=Rotate, nlgeom=yes, inc=50000
*Coupled temperature-displacement, deltmx=100.0
0.05, 1.0, 1.e-6, 0.05

** 1. No chemical BCs: DOF 11 (mu) left free (closed system, no imposed diffusion)
** *Boundary, amplitude=chemProfile
** Set-7, 11, 11, 1.0

** 2. Rigid body rotation of the reference node: 90 deg about z (DOF 6, radians)
*Boundary
ref_node, 1, 5, 0.0
ref_node, 6, 6, 1.5707963
extra_element, encastre
extra_element, 11, 11, 0.0

** Output requests
*Output, field, time marks=no
*node output, nset=all_nodes
u, nt, rf
*node output, nset=extra_element
u
*element output, elset=dummy_mesh
uvarm, le

*End Step
************************************************************************
** STEP 2: STRETCHING (DEFORMATION ONLY)
************************************************************************
** *Step, Name=Stretch, nlgeom=yes, inc=50000
** *Coupled temperature-displacement, deltmx=100.0
** 0.1, <TSTRETCH>, 1.e-6, 300.0

** ** 1. Chemical Boundary Condition (Holding constant!)
** ** By redefining it without an amplitude, Abaqus holds it at <mu0>
** ** continuously from the beginning of this step to the end.
** *Boundary, op=MOD
** Set-1, 11, 11, <MU0>

** ******************** BOUNDARY CONDITIONS********************************
** **
** ** ----------------------------------------------------------------
** **     UNIAXIAL BCS
** ** ----------------------------------------------------------------
** **INCLUDE, file=bcs_uni.inp
** ** ----------------------------------------------------------------
** **     BIAXIAL BCS
** ** ----------------------------------------------------------------
** **INCLUDE, file=bcs_bi.inp
** ** ----------------------------------------------------------------
** **     SHEAR BCS
** ** ----------------------------------------------------------------
** **INCLUDE, file=bcs_sh.inp
** ** ----------------------------------------------------------------

** ** *Output, field, time marks=no
** ** *node output, nset=all_nodes
** ** u, rf
** ** ** u,nt,rf

** ** Output requests
** *Output, field, time marks=no
** *node output, nset=all_nodes
** u, nt, rf
** *element output, elset=dummy_mesh
** uvarm, le

** *End Step


** *Step, Name=shear, nlgeom=yes, inc=50000
** *static
** 0.1,1.0,1e-5,0.1
** **Coupled temperature-displacement, deltmx=100.0
** **0.4,<tf>,1.e-6,300.0
** *** *CONTROLS, PARAMETERS=LINE SEARCH
** *** 10,1.0,0.0001,0.25,0.10
** **CONTROLS, PARAMETERS=TIME INCREMENTATION
** **,,,,,,,10,,,,,,
** **
** **
** **Boundary, amplitude=chemProfile
** **Set-1,2,11,1.0
** ** *Boundary, type=displacement
** ** Set-2, 2,2, 0.6
** *Boundary, type=displacement
** Set-2, 1,1, 0.3
** Set-2, 2,2
** **
** **Boundary
** **extra_element,encastre
** **extra_element,11,11,0.0
** **
** *** *Restart, write, number interval=1, overlay
** **
** **Output, field, number interval=1, time marks=no
** *Output, field, time marks=no
** *node output, nset=all_nodes
** u,nt,rf
** *node output, nset=extra_element
** u
** *element output, elset=dummy_mesh
** uvarm,le
** **
** *End Step
************************************************************************
** ----------------------------------------------------------------
** OUTPUT
**Output, field, number interval=1, time marks=no
** *Output, field, time marks=no
** *node output, nset=all_nodes
** u, rf
** ** u,nt,rf

** ** *node output, nset=extra_element
** ** u
** *element output, elset=dummy_mesh
** uvarm,le
** *End Step
** ----------------------------------------------------------------
** *Step, name=static2, nlgeom=Yes, inc=10000
** *Static
** 0.01, 10., 1e-05,0.25
** ** *Coupled temperature-displacement, deltmx=100.0
** ** 0.4,20.,1.e-6,0.2
** *Boundary, type=displacement, amplitude=amp
** Set-2, 1,1, .125
** Set-2, 2,2, .0
** ** ----------------------------------------------------------------
** ** OUTPUT
** *Output, field, time marks=no
** *node output, nset=all_nodes
** u,nt,rf
** *node output, nset=extra_element
** u
** *element output, elset=dummy_mesh
** uvarm,le
** *End Step
** ** ----------------------------------------------------------------
** *Step, name=static3, nlgeom=Yes, inc=10000
** *Static
** 0.01, 20., 1e-05,0.2
** ** *Coupled temperature-displacement, deltmx=100.0
** ** 0.4,20.,1.e-6,0.2
** *Boundary, type=displacement, amplitude=amp
** Set-2, 1,1, .125
** Set-2, 2,2, .0
** ** ----------------------------------------------------------------
** ** OUTPUT
** *Output, field, time marks=no
** *node output, nset=all_nodes
** u,nt,rf
** *node output, nset=extra_element
** u
** *element output, elset=dummy_mesh
** uvarm,le
** *End Step
** ** ----------------------------------------------------------------
